Задание1
X := [1; 2; 3; 4; 5; 6; 7; 8; 9; 10]
dnorm(X, mean(X), stdev(X)) = [0.0407085; 0.0661077; 0.0950994; 0.121188; 0.136805; 0.136805; 0.121188; 0.0950994; 0.0661077; 0.0407085]
length(X) = 10
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mean(X) = 5.5
mode(X) =  # error: Ни одно значение не встречается чаще других.
max(X) = 10
min(X) = 1
max(X) - min(X) = 9
stdev(X) = 2.87228
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Задание3
vx := [1; 2; 3; 4; 5; 6; 7; 8; 9; 10]
vy := [234; 245; 562; 672; 622; 552; 672; 671; 124; 411]
g := [1; 2; 3]
k1 := line(vx, vy)
p2 := regress(vx, vy, 3)
y1(x) := k1[0] + k1[1]*x
y2(x) := interp(p2, vx, vy, x)
kd[1] := corr(vy, y1(vx))^2
kd[2] := corr(vy, vectorize(y2(vx)))^2
kd[1] = 0.0116018
kd[2] = 0.580412
p4 := expfit(vx, vy, g)
p3 := loess(vx, vy, 0.75)
y3(x) := interp(p3, vx, vy, x)
y4(x) := p4[0]*e^(p4[1]*x) + p4[2]
kd[3] := corr(vy, vectorize(y3(vx)))^2
kd[4] := corr(vy, vectorize(y4(vx)))^2
kd[3] = 0.645561
kd[4] = 0.0713255
p5 := logfit(vx, vy, g)
y5(x) := p5[0]*ln(p5[1] + x) + p5
kd[5] := corr(vy, vectorize(y5(vx)))^2  # error: Значение должно быть матрицей со скалярными элементами.
kd[5] =  # error: Эта переменная не определена.
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