# Лабораторная работа №3
Точки := [1, 1.5; 2.5, 2; 3, 3; 4, 4; 5.5, 6; 6, 8; 7, 11.5; 8, 16; 9, 22; 10, 40]
# метод
# наименьших
# квадратов
x := Точки[:, 0]
y := Точки[:, 1]
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x = [1; 2.5; 3; 4; 5.5; 6; 7; 8; 9; 10]
y = [1.5; 2; 3; 4; 6; 8; 11.5; 16; 22; 40]
m := 3
n := 9
i := 0 .. last(x)
j := 0 .. m
A[i, j] := x[i]^j
transpose(A) = [
    1, 1, 1, 1, 1, 1, 1, 1, 1, 1;
    1, 2.5, 3, 4, 5.5, 6, 7, 8, 9, 10;
    1, 6.25, 9, 16, 30.25, 36, 49, 64, 81, 100;
    1, 15.625, 27, 64, 166.375, 216, 343, 512, 729, 1000
]
A = [
    1, 1, 1, 1;
    1, 2.5, 6.25, 15.625;
    1, 3, 9, 27;
    1, 4, 16, 64;
    1, 5.5, 30.25, 166.375;
    1, 6, 36, 216;
    1, 7, 49, 343;
    1, 8, 64, 512;
    1, 9, 81, 729;
    1, 10, 100, 1000
]
# вычисляем произведение матриц
Z := transpose(A)*A
Z = [
    10, 56, 392.5, 3074;
    56, 392.5, 3074, 25646.1;
    392.5, 3074, 25646.1, 222798;
    3074, 25646.1, 222798, 1990641
]
b := transpose(A)*y
# Находим
# решение
# системы
# уравнений
c := Z^-1*b
b = [114; 919; 7944; 71270.5]
c = [-2.90311; 4.73306; -1.20568; 0.114252]
# вычисляем
# вектор m из
# m+1
t := 0, 0.01 .. x[last(x)]
φ(x) := sum(c[i]*x^i, i = 0 .. m)
# вычисляем в произвольной точке
# х функционал мнк
sum((y[i] - φ(x[i]))^2, i = 0 .. last(x)) = 19.9323
t =  # no stored result
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# выводим на графике полученную зависимость f(x)
