# Лабораторная работа №4
# Поиск экстремума функции
f(x1, x2) := x1 + x2
-функция цели, подлежащая максимизации
x1 := 1
x2 := 1
-начальные значения переменных
Given
x1 ≥ 0
x2 ≥ 0
-система ограничений
x1 + 2*x2 ≤ 14
-5*x1 - 3*x2 ≤ 15
2*x1 - 3*x2 ≤ 12
x := Maximize(f, x1, x2)
-определение максимального значения функции цели
x = [9.42857; 2.28571]
-найденное оптимальное решение
f(9.4, 2.3) = 11.7
-оптимальное значение функции цели
