# Лабораторная работа №5
ORIGIN := 1
P1 := [0.5, 0.5; 0.4, 0.6]
R1 := [9, 3; 3, -7]
P2 := [0.8, 0.2; 0.7, 0.3]
R2 := [4, 4; 1, -19]
n := 2
u :=
    f ← [0; 0]
    for i ∈ 1 .. n
        F[1, 1] ← P1[1, 1]*(R1[1, 1] + f[1]) + P1[1, 2]*(R1[1, 2] + f[2])
        F[1, 2] ← P2[1, 1]*(R2[1, 1] + f[1]) + P2[1, 2]*(R2[1, 2] + f[2])
        F[2, 1] ← P1[2, 2]*(R1[2, 2] + f[2]) + P1[2, 1]*(R1[2, 1] + f[1])
        F[2, 2] ← P2[2, 2]*(R1[2, 2] + f[2]) + P1[2, 1]*(R1[2, 1] + f[1])
        u[1, i] ← 1 if F[1, 1] > F[1, 2]
        u[1, i] ← 2 otherwise
        u[2, i] ← 1 if F[2, 1] > F[2, 2]
        u[2, i] ← 2 otherwise
        max[1, i] ← F[1, 1] if F[1, 1] > F[1, 2]
        max[1, i] ← F[1, 2] otherwise
        max[2, i] ← F[2, 1] if F[2, 1] > F[2, 2]
        max[2, i] ← F[2, 2] otherwise
        f[1] ← f[1] + max[1, i]
        f[2] ← f[2] + max[2, i]
        i
    u
u = [1, 2; 2, 2]
