# Лабораторная работа 6
y(x) := x^4 - 2*x^3 + 5
n := 10000
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i := 1 .. n
x[i] := rnd(4) - 2
y[i] := y(x[i])
y[0] := max(y)
y[0] = 36.9872
x[0] :=
    for i ∈ 1 .. n
        x[0] ← x[i] if y[0] == y[i]
        x[0]
x[0] = -1.99977
