# Лабораторная работа №7
F(x1, x2) := sin(x1)^2 + sin(x2)^2 - sin(x1*x2)^2
# [component: inputs F, F]
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xd2 := (2*(x1^3 + x2^3)*3*x2^2 - (x1^3 + x2^3)^2*cos(x1*x2))/sin(x1*x2)^2  # error: Эта переменная неопределена.
x1 := 1
xd1 := (2*(x1^3 + x2^3)*3*x1^2 - (x1^3 + x2^3)^2*cos(x1*x2))/sin(x1*x2)^2  # error: Эта переменная неопределена.
x2 := 1
P := Minimize(F, x1, x2)
(2*(x1^3 + x2^3)*3*x2^2 - (x1^3 + x2^3)^2*cos(x1*x2))/sin(x1*x2)^2
P = [1.58896e-10; -6.3807e-10]
(2*(x1^3 + x2^3)*3*x1^2 - (x1^3 + x2^3)^2*cos(x1*x2))/sin(x1*x2)^2
x1 := 1.589*10^-10
x2 := -6.381*10^-10
L := sin(1.589*10^-10)^2 + sin(-6.381*10^-10)^2 - sin(-6.381*10^-10*1.589*10^-10)^2
F(x1, x2) = 4.32421e-19
L = 4.32421e-19
x1 := 1
x2 := 1
P := Maximize(F, x1, x2)
P = [-2.4427e-10; 1.5708]
x1 := -2.443*10^-10
x2 := 1.571
F(x1, x2) = 1
# Условный экстемум
x2 := 1
x1 := 1
-5 < x1 < -1
-5 < x2 < -1
P := Minimize(F, x1, x2)
P = [1.58896e-10; -6.3807e-10]
x1 := 1.589*10^-10
x2 := -6.381*10^-10
Given
F(x1, x2) = 4.32421e-19
x1 := 1
x2 := 1
Given
0 < x1
0 < x2
P := Minimize(F, x1, x2)
P = [1.58896e-10; -6.3807e-10]
x1 := 1.589*10^-10
x2 := -6.381*10^-10
F(x1, x2) = 4.32421e-19
x1 := -10
x2 := -10
Given
-4 < x1 < 0
-4 < x2 < 0
P := Maximize(F, x1, x2)
P = [-1.74453; -1.74453]
x1 := -1.745
x2 := -1.745
F(x1, x2) = 1.93062
