Влад
# Дэн | Илья
0 + 4 + 10 + 15 + 21 + 29 + 36 + 51 + 68 = 234
1 + 4 + 6.7 + 7 + 7.2 + 7.8 + 8.6 = 42.3
1.1 + 2.5 + 3 + 5.8 + 7.2 + 8.7 = 28.3
66.7 + 71.0 + 76.3 + 80.6 + 85.7 + 92.9 + 99.4 + 113.6 + 125.1 = 811.3
0 + 1.7 + 10.82 + 14.7 + 9.62 + 17.68 + 18.86 = 73.38
8.5 + 4.8 + 4.1 + 6.6 + 7.9 + 9.2 = 41.1
1^2 + 4^2 + 6.7^2 + 7^2 + 7.2^2 + 7.8^2 + 8.6^2 = 297.53
0^2 + 4^2 + 10^2 + 15^2 + 21^2 + 29^2 + 36^2 + 51^2 + 68^2 = 10144
1.1^2 + 2.5^2 + 3^2 + 5.8^2 + 7.2^2 + 8.7^2 = 177.63
0^2 + 1.7^2 + 10.82^2 + 14.7^2 + 9.62^2 + 17.68^2 + 18.86^2 = 1096.88
66.7^2 + 71.0^2 + 76.3^2 + 80.6^2 + 85.7^2 + 92.9^2 + 99.4^2 + 113.6^2 + 125.1^2 = 76218.2
8.5^2 + 4.8^2 + 4.1^2 + 6.6^2 + 7.9^2 + 9.2^2 = 302.71
1*0 + 4*1.7 + 6.7*10.82 + 7*14.7 + 7.2*9.62 + 7.8*17.68 + 8.6*18.86 = 551.558
0*66.7 + 4*71.0 + 10*76.3 + 15*80.6 + 21*85.7 + 29*92.9 + 36*99.4 + 51*113.6 + 68*125.1 = 24628.6
1.1*8.5 + 2.5*4.8 + 3*4.1 + 5.8*6.6 + 7.2*7.9 + 8.7*9.2 = 208.85
28.3/6 = 4.71667
42.3/7 = 6.04286
234/9 = 26
41.1/6 = 6.85
73.38/7 = 10.4829
811.3/9 = 90.1444
177.63/6 - 4.717^2 = 7.35491
297.53/7 - 6.043^2 = 5.98644
1.014*10^4/9 - 26^2 = 450.667
302.71/6 - 6.85^2 = 3.52917
1.097*10^3/7 - 10.483^2 = 46.821
7.622*10^4/9 - 90.144^2 = 342.948
208.85/6 - 4.717*6.85 = 2.49688
551.558/7 - 6.043*10.483 = 15.4452
2.463*10^4/9 - 26*90.144 = 392.923
2.497/(sqrt(7.355)*sqrt(3.529)) = 0.490119
15.445/(sqrt(5.986)*sqrt(46.821)) = 0.92257
392.923/(sqrt(450.667)*sqrt(342.948)) = 0.99946
# Средняя положительная | Очень высокая положительная | Очень высокая положительная | y 95.376+-0.847
392.923/450.667 = 0.87187
2.497/7.355 = 0.339497
15.445/5.986 = 2.58019
sqrt(1/9*((66.7 - (0.872*0 + 67.472))^2 + (71.0 - (0.872*4 + 67.472))^2 + (76.3 - (0.872*10 + 67.472))^2 + (80.6 - (0.872*15 + 67.472))^2 + (85.7 - (0.872*21 + 67.472))^2 + (92.9 - (0.872*29 + 67.472))^2 + (99.4 - (0.872*36 + 67.472))^2 + (113.6 - (0.872*51 + 67.472))^2 + (125.1 - (0.872*68 + 67.472))^2)) = 0.846566
90.144 - 0.872*26 = 67.472
6.85 - 0.339*4.717 = 5.25094
10.483 - 2.58*6.043 = -5.10794
y := 0.872*32 + 67.472 = 95.376
y := 0.339*6.0 + 5.251 = 7.285
y := 2.58*5.0 + (-5.108) = 7.792  # y 7.792+-2.638
sqrt(1/7*((0 - (2.58*1 + (-5.108)))^2 + (1.7 - (2.58*4 + (-5.108)))^2 + (10.82 - (2.58*6.7 + (-5.108)))^2 + (14.7 - (2.58*7 + (-5.108)))^2 + (9.62 - (2.58*7.2 + (-5.108)))^2 + (17.68 - (2.58*7.8 + (-5.108)))^2 + (18.86 - (2.58*8.6 + (-5.108)))^2)) = 2.63756
sqrt(1/6*((8.5 - (0.339*1.1 + 5.251))^2 + (4.8 - (0.339*2.5 + 5.251))^2 + (4.1 - (0.339*3 + 5.251))^2 + (6.6 - (0.339*5.8 + 5.251))^2 + (7.9 - (0.339*7.2 + 5.251))^2 + (9.2 - (0.339*8.7 + 5.251))^2)) = 1.63717
# y 7.285+-1.637
