E := 0.9
τ := 2*10^-0
q := 6
k := -10 .. 10
T := q*τ
T = 12
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t := -40, -39.98 .. 40
ω := 2*(π/T)
u1(t) := E*(Φ(t + τ/2) - Φ(t - τ/2))
ω = 0.523599
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n := 1 .. 30
n := 1 .. 30
u(t) := sum(u1(t - k*T), k)
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A[0] := E/q = 0.15
A[n] := 2*E*|sin(n*ω*τ/2)|/(π*n)
ϕ[n] := if(sin(n*ω*τ/2) ≥ 0, 0, π)
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Lab2
N := 5
n := 1 .. N
A[0] = 0.15
us(t) := A[0] + sum(A[n]*cos(n*ω*t - ϕ[n]), n)
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N := 10
n := 1 .. N
us(t) := A[0] + sum(A[n]*cos(n*ω*t - ϕ[n]), n)
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N := 20
n := 1 .. N
us(t) := A[0] + sum(A[n]*cos(n*ω*t - ϕ[n]), n)
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N := 30
n := 1 .. N
us(t) := A[0] + sum(A[n]*cos(n*ω*t - ϕ[n]), n)
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