# Лабораторная работа 3
# Вариант 1
C := 10*10^-12
L := 1*10^-3
R := 20
q0 := 10^-8
ε0 := 1
ω0 := 1/sqrt(L*C)
β := R/(2*L)
T := 2*π/sqrt(ω0^2 - β^2)
ωr := sqrt(ω0^2 - 2*β^2)
ω0 = 10000000
ω := 0.9
tn := 20*T
Given
d^2/dt^2(q(t)) + 2*β*(d/dt(q(t))) + ω0^2*q(t) == ε0/L*cos(ω*t)
q(0) == q0
q'(0) == 0
q1 := Odesolve(t, tn)
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I(t) := d/dt(q1(t))
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# Задание 1
C := 10*10^-12
L := 1*10^-3
R := 0
q0 := 10^-8
ε0 := 0
ω0 := 1/sqrt(L*C)
β := R/(2*L)
T := 2*π/sqrt(ω0^2 - β^2)
ωr := sqrt(ω0^2 - 2*β^2)
ω0 = 10000000
ω := 0.9
tn := 10*T
Given
d^2/dt^2(q(t)) + 2*β*(d/dt(q(t))) + ω0^2*q(t) == ε0/L*cos(ω*t)
q(0) == q0
q'(0) == 0
q1 := Odesolve(t, tn)
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I(t) := d/dt(q1(t))
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# Задание 2
We(t) := q1(t)^2/(2*C)
Wm(t) := L*I(t)^2/2
W(t) := We(t) + Wm(t)
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# Задание 3
C := 10*10^-12
L := 1*10^-3
R := 20
q0 := 10^-8
ε0 := 1
ω0 := 1/sqrt(L*C)
β := R/(2*L)
T := 2*π/sqrt(ω0^2 - β^2)
ωr := sqrt(ω0^2 - 2*β^2)
ω0 = 10000000
ω := 0.9
tn := 50*T
Given
d^2/dt^2(q(t)) + 2*β*(d/dt(q(t))) + ω0^2*q(t) == ε0/L*cos(ω*t)
q(0) == q0
q'(0) == 0
q1 := Odesolve(t, tn)
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I(t) := d/dt(q1(t))
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We(t) := q1(t)^2/(2*C)
Wm(t) := L*I(t)^2/2
W(t) := We(t) + Wm(t)
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Θ := β*T
Θ = 0.00628319
Q := π/Θ
Q = 500
# Задание 4
C := 10*10^-12
L := 1*10^-3
R := 20
q0 := 10^-8
ε0 := 1
T := 2*π/sqrt(ω0^2 - β^2)
ω0 := 1/sqrt(L*C)
β := R/(2*L)
ωr := sqrt(ω0^2 - 2*β^2)
ω0 = 10000000
ω := 2
tn := 20*T
Given
d^2/dt^2(q(t)) + 2*β*(d/dt(q(t))) + ω0^2*q(t) == ε0/L*cos(ω*t)
q(0) == q0
q'(0) == 0
q1 := Odesolve(t, tn)
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I(t) := d/dt(q1(t))
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A(ω) := ε0/(ω*sqrt(R^2 + (ω*L - 1/(ω*C))^2))
ω := 0, 100 .. ωr*2
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Δω := -0.01*ωr, -0.01*ωr + 10^-2*0.01*ωr .. 0.01*ωr
K(Δω) := 1/sqrt(1 + (2*Q*Δω/ωr)^2)
Δω = [
    -99999.9; -98999.9; -97999.9; -96999.9; -95999.9; -94999.9; -93999.9; -92999.9; -91999.9; -90999.9
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]
ωr = 9999990
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Δωp := 0.7
Δfp := Δωp/(2*π)
Δfp = 0.111408
