# Лабораторная работа 4
# Вариант 1
# Задание 1
N := 100
k := 0 .. N
E := 0.9
τi := 2
x[k] := -5 + 0.1*k
U := E*(Φ(x + τi/2) - Φ(x - τi/2)) + rnorm(N + 1, 0, 0.1)
Q := cspline(x, U)
Z(t) := interp(Q, x, U, t)
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k := 0 .. 200
τ[k] := -1 + 0.01*k
T := 4
R[k] := (1/(2*T))*integral(Z(t)*Z(t + τ[k]), t = -T .. T)
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# Задание 2
A := cspline(τ, R)
Rs(x) := interp(A, τ, R, x)
n := 400
f[n] := 0.01*n
W[n] := 4*integral(Rs(x)*cos(2*π*f[n]*x), x = 0 .. 1)
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