# Задание 1
Z := [5; 2; 10]
Pl := [20; 50; 10]
A := [90, 20, 0; 15, 75, 5; 250, 50, 350]
# Критерий принятия решения Байеса
# P - вектор вероятностей состояния природы
P := [0.3; 0.5; 0.2]
# Максимальное математическое ожидание
Mat(m, n) :=
    for t ∈ 0 .. m
        mat ← max(sum(P[k, 0]*A[t, k], k = 0 .. 2))
    mat
# Математичесое ожидание
# 1-ой стратегии
# Математичесое ожидание
# 2-ой стратегии
# Математичесое ожидание
# 3-ой стратегии
Mat(2, 0) = 170
Mat(1, 0) = 43
Mat(0, 0) = 37
max(augment(Mat(2, 0), Mat(1, 0), Mat(0, 0))) = 170  # Стратегия № 1 оптимальна
# Максимальный критерий Вальда
# транспонирование матрицы игры с природой
AT := transpose(A)
max(min(AT[:, 0]), min(AT[:, 1]), min(AT[:, 2])) = 50
# Максимум 1-го
# столбца
# Максимум 2-го
# столбца
# Максимум 3-го
# столбца
max(A[:, 0]) = 250
max(A[:, 1]) = 75
max(A[:, 2]) = 350
# Матрица риска R | Стратегия № 3 оптимальна
R := augment(max(A[:, 0]) - A[:, 0], max(A[:, 1]) - A[:, 1], max(A[:, 2]) - A[:, 2]) = [160, 55, 350; 235, 0, 345; 0, 25, 0]
# Транспонирование матрицы
R1 := transpose(R)
# Макс. элемент в строках матрицы риска
V := augment(max(R1[:, 0]), max(R1[:, 1]), max(R1[:, 2])) = [350, 345, 25]
min(V) = 25  # Стратегия № 3 оптимальна
# Критерий Гурвица
λ := 0.5
# Минимум по строкам умноженным на λ
V := augment(λ*min(AT[:, 0]), λ*min(AT[:, 1]), λ*min(AT[:, 2])) = [0, 2.5, 25]
# Максимум по строкам умноженным на (1-λ)
V_ := augment((1 - λ)*max(A[:, 0]), (1 - λ)*max(A[:, 1]), (1 - λ)*max(A[:, 2])) = [125, 37.5, 175]
# Максимум из поэлементного сложения
max(V + V_) = 200  # Стратегия № 3 оптимальна
# Задание 2
A := [80, 30, -15; 15, 60, 5; -4, 19, 47; 5, 35, 30]
# Критерий принятия решения Байеса
# P - вектор вероятностей состояния природы
P := [0.2; 0.7; 0.1]  # Максимальное математическое ожидание
Mat(m, n) :=
    for t ∈ 0 .. m
        mat ← max(sum(P[k, 0]*A[t, k], k = 0 .. 2))
    mat
# Математичесое ожидание
# 1-ой стратегии
# Математичесое ожидание
# 2-ой стратегии
# Математичесое ожидание
# 3-ой стратегии
Mat(3, 0) = 28.5
Mat(2, 0) = 17.2
Mat(1, 0) = 45.5
# Математичесое ожидание
# 4-ой стратегии
Mat(0, 0) = 35.5
max(augment(Mat(2, 0), Mat(1, 0), Mat(0, 0))) = 45.5  # Стратегия № 3 оптимальна
# Задание 3
# Матрица экспериментов | Матрица потерь
Ω := [1, 0.4, 0.2; 0.3, 0.85, 0.5; 0.05, 0.4, 1]
L := [0.7, 0.25, 0.15; 0.2, 0.7, 0.35; 0.1, 0.05, 0.5]
P := [0.3; 0.5; 0.2]
Mat(m, n) :=
    for t ∈ 0 .. m
        mat ← max(sum(P[k, 0]*Ω[t, k], k = 0 .. 2))
    mat
# 1 стратегии | 2 стратегии | 3 стратегии
Mat(2, 0) = 0.415
Mat(1, 0) = 0.615
Mat(0, 0) = 0.54
# Задание 4
# Матрица  экспериментов | Матрица потерь
B := [300, 200, 100, -50; 500, 400, 300, -100; 450, 380, -50, -300; 400, 100, -100, -500]
M := [0.5, 0.4, 0.2, 0.05; 0.3, 0.25, 0.27, 0.15; 0.15, 0.2, 0.13, 0.3; 0.05, 0.15, 0.3, 0.5]
P := [0.3; 0.4; 0.6; 0.7]
Mat(m, n) :=
    for t ∈ 0 .. m
        mat ← max(sum(P[k, 0]*B[t, k], k = 0 .. 2))
    mat
# 1 стратегия | 2 стратегия | 3 стратегия | 4 стратегия
Mat(3, 0) = 100
Mat(2, 0) = 257
Mat(1, 0) = 490
Mat(0, 0) = 230
# Следовательно компания должна бурлить 3 скважины в год
# Задание 5
# Матрица экспериментов | Матрица потерь
C := [450, -50, 150; 150, 500, 300; 250, 350, 480]
D := [0.75, 0.01, 0.15; 0.1, 0.9, 0.25; 0.15, 0.09, 0.6]
P := [0.3; 0.5; 0.2]
Mat(m, n) :=
    for t ∈ 0 .. m
        mat ← max(sum(P[k, 0]*C[t, k], k = 0 .. 2))
    mat
Mat(1, 0) = 355
Mat(0, 0) = 140
Mat(2, 0) = 346
# Следовательно лучше будет собрать конфигурацию: сетевойкабель, компьютеры высокой мощности, сервер, цветной лазерный принтер, ч\б лазерный принтер, плоттер.
# Задача 6
# Вариант 1
# Матрица прибыли фирмы | Матрица экспериметов
A := [20, 19, 17, 15; 19, 21, 18, 19; 15, 18, 22, 16; 15, 16, 19, 21]
B := [0.2, 0.1, 0.7, 0.5; 0.4, 0.1, 0.1, 0.1; 0.2, 0.7, 0.1, 0.3; 0.2, 0.1, 0.1, 0.1]
P := [0.2; 0.3; 0.3; 0.2]
Mat(m, n) :=
    for t ∈ 0 .. m
        mat ← max(sum(P[k, 0]*A[t, k], k = 0 .. 2))
    mat
Mat(1, 0) = 15.5
Mat(0, 0) = 14.8
Mat(3, 0) = 13.5
Mat(2, 0) = 15
# Следовательно вариант 2 наилучшая стратегия
AT := transpose(A)
max(min(AT[:, 0]), min(AT[:, 1]), min(AT[:, 2])) = 18
# Максимум 4-го столбца
# Максимум 1-го
# столбца
# Максимум 2-го
# столбца
# Максимум 3-го
# столбца
max(A[:, 3]) = 21
max(A[:, 0]) = 20
max(A[:, 1]) = 21
max(A[:, 2]) = 22
# Стратегии № 1,2,3 оптимальны
# Матрица риска R
R := augment(max(A[:, 0]) - A[:, 0], max(A[:, 1]) - A[:, 1], max(A[:, 2]) - A[:, 2]) = [0, 2, 5; 1, 0, 4; 5, 3, 0; 5, 5, 3]
R1 := transpose(R)
# Макс. элемент в строках матрицы риска
V := augment(max(R1[:, 0]), max(R1[:, 1]), max(R1[:, 2])) = [5, 4, 5]
min(V) = 4
# Стратегии № 1,2 оптимальны
# Критерий Гурвица
λ := 0.5
# Минимум по строкам умноженным на λ
V := augment(λ*min(AT[:, 0]), λ*min(AT[:, 1]), λ*min(AT[:, 2])) = [7.5, 9, 7.5]
# Максимум по строкам умноженным на (1-λ)
V_ := augment((1 - λ)*max(A[:, 0]), (1 - λ)*max(A[:, 1]), (1 - λ)*max(A[:, 2])) = [10, 10.5, 11]
# Максимум из поэлементного сложения
max(V + V_) = 19.5  # Стратегия № 2 оптимальна
# Задание 7
# Вариант 1
B := [
    0.1, 0.4, 0.2, 0.3, 0.2;
    0.2, 0.3, 0.1, 0.1, 0.2;
    0.3, 0.2, 0.3, 0.2, 0.2;
    0.2, 0.05, 0.1, 0.2, 0.3;
    0.2, 0.05, 0.3, 0.2, 0.1
]
A := [
    5, 14, 0.3, 0.5, 0.6;
    5, 15, 0.3, 0.5, 0.6;
    5, 16, 0.3, 0.5, 0.6;
    5, 17, 0.3, 0.5, 0.6;
    5, 18, 0.3, 0.5, 0.6
]
P := [0.2; 0.3; 0.1; 0.2; 0.2]
Mat(m, n) :=
    for t ∈ 0 .. m
        mat ← max(sum(P[k, 0]*A[t, k], k = 0 .. 2))
    mat
Mat(1, 0) = 5.53
Mat(0, 0) = 5.23
Mat(3, 0) = 6.13
Mat(2, 0) = 5.83
# Следовательно 1 стратегия оптимальна
AT := transpose(A)
max(min(AT[:, 0]), min(AT[:, 1]), min(AT[:, 2])) = 0.3
# Максимум 4-го столбца
# Максимум 1-го
# столбца
# Максимум 2-го
# столбца
# Максимум 3-го
# столбца
max(A[:, 3]) = 0.5
max(A[:, 0]) = 5
max(A[:, 1]) = 18
max(A[:, 2]) = 0.3
# Стратегия № 1 оптимальна
# Матрица риска R
R := augment(max(A[:, 0]) - A[:, 0], max(A[:, 1]) - A[:, 1], max(A[:, 2]) - A[:, 2]) = [0, 4, 0; 0, 3, 0; 0, 2, 0; 0, 1, 0; 0, 0, 0]
R1 := transpose(R)
# Макс. элемент в строках матрицы риска
V := augment(max(R1[:, 0]), max(R1[:, 1]), max(R1[:, 2])) = [4, 3, 2]
min(V) = 2
# Стратегия № 1 оптимальна
λ := 0.5
# Минимум по строкам умноженным на λ
V := augment(λ*min(AT[:, 0]), λ*min(AT[:, 1]), λ*min(AT[:, 2])) = [0.15, 0.15, 0.15]
# Максимум по строкам умноженным на (1-λ)
V_ := augment((1 - λ)*max(A[:, 0]), (1 - λ)*max(A[:, 1]), (1 - λ)*max(A[:, 2])) = [2.5, 9, 0.15]
# Максимум из поэлементного сложения
max(V + V_) = 9.15  # Стратегия 1 оптимальна
# Задача 8
# Вариант 8
A := [60, 70, 80, 90; 70, 50, 80, 80; 50, 80, 60, 70; 60, 60, 90, 80; 60, 50, 70, 100]
B := [
    0.1, 0.4, 0.2, 0.3;
    0.2, 0.2, 0.1, 0.1;
    0.3, 0.2, 0.3, 0.05;
    0.2, 0.1, 0.1, 0.2;
    0.1, 0.1, 0.3, 0.35
]
P := [0.2; 0.3; 0.3; 0.2]
Mat(m, n) :=
    for t ∈ 0 .. m
        mat ← max(sum(P[k, 0]*A[t, k], k = 0 .. 2))
    mat
Mat(1, 0) = 53
Mat(0, 0) = 57
Mat(3, 0) = 57
Mat(2, 0) = 52
# Стратегия 1 оптимальна
AT := transpose(A)
max(min(AT[:, 0]), min(AT[:, 1]), min(AT[:, 2])) = 60
# Максимум 4-го столбца
# Максимум 1-го
# столбца
# Максимум 2-го
# столбца
# Максимум 3-го
# столбца
max(A[:, 3]) = 100
max(A[:, 0]) = 70
max(A[:, 1]) = 80
max(A[:, 2]) = 90
# Стратегия № 4 оптимальна
# Матрица риска R
R := augment(max(A[:, 0]) - A[:, 0], max(A[:, 1]) - A[:, 1], max(A[:, 2]) - A[:, 2]) = [10, 10, 10; 0, 30, 10; 20, 0, 30; 10, 20, 0; 10, 30, 20]
R1 := transpose(R)
# Макс. элемент в строках матрицы риска
V := augment(max(R1[:, 0]), max(R1[:, 1]), max(R1[:, 2])) = [10, 30, 30]
min(V) = 10
# Стратегия 1 оптимальна
λ := 0.5
# Минимум по строкам умноженным на λ
V := augment(λ*min(AT[:, 0]), λ*min(AT[:, 1]), λ*min(AT[:, 2])) = [30, 25, 25]
# Максимум по строкам умноженным на (1-λ)
V_ := augment((1 - λ)*max(A[:, 0]), (1 - λ)*max(A[:, 1]), (1 - λ)*max(A[:, 2])) = [35, 40, 45]
# Максимум из поэлементного сложения
max(V + V_) = 70
# Стратегия 1 оптимальна
