m1 := [1; 5; 5; 0; 6; 2]
m2 := [2; 8; 3; 5; 1; 0]
m3 := [1; 2; 4; 4; 6; 1]
m4 := [1; 7; 5; 5; 6; 2]
m5 := [1; 2; 5; 3; 1; 2]
m6 := [1; 5; 5; 4; 3; 2]
M := stack(transpose(m1), transpose(m2), transpose(m3), transpose(m4), transpose(m5), transpose(m6))
M = [
    1, 5, 5, 0, 6, 2;
    2, 8, 3, 5, 1, 0;
    1, 2, 4, 4, 6, 1;
    1, 7, 5, 5, 6, 2;
    1, 2, 5, 3, 1, 2;
    1, 5, 5, 4, 3, 2
]
covar(M) :=
    for j ∈ 0 .. cols(M) - 1
        Y[:, j] ← M[:, j] - mean(M[:, j])
    transpose(Y)*Y/cols(M)
D := covar(M)
D = [
    0.138889, 0.527778, -0.25, 0.25, -0.472222, -0.25;
    0.527778, 5.13889, -0.583333, 1.25, -0.361111, -0.583333;
    -0.25, -0.583333, 0.583333, -0.583333, 0.583333, 0.583333;
    0.25, 1.25, -0.583333, 2.91667, -1.08333, -0.583333;
    -0.472222, -0.361111, 0.583333, -1.08333, 5.13889, 0.583333;
    -0.25, -0.583333, 0.583333, -0.583333, 0.583333, 0.583333
]
U := eigenvecs(D)
transpose(U)*D*U = [
    0, 0, 0, 0, 0, 0;
    0, 0.000405502, 0, 0, 0, 0;
    0, 0, 0.80497, 0, 0, 0;
    0, 0, 0, 2.14768, 0, 0;
    0, 0, 0, 0, 4.78058, 0;
    0, 0, 0, 0, 0, 6.76637
]
F := M*U
F = [
    2.12132, 2.10147, -4.2138, 0.758513, 7.84125, 1.50569;
    2.12132, 2.10344, -3.62872, -1.35338, 6.28557, -6.2903;
    2.12132, 2.09597, -3.55154, -4.00819, 5.8913, 1.31171;
    2.12132, 2.12151, -5.71213, -2.84846, 9.30867, -1.89887;
    2.12132, 2.12222, -5.24619, -1.38739, 2.20026, -0.84122;
    2.12132, 2.06187, -5.60229, -1.78345, 5.72482, -1.97708
]
Λ := eigenvals(D)
Λ = [0; 0.000405502; 0.80497; 2.14768; 4.78058; 6.76637]
N := reverse(sort(Λ))
N = [6.76637; 4.78058; 2.14768; 0.80497; 0.000405502; 0]
# Наибольшее собственное число имеет 6.766
j := 0 .. cols(D) - 1
V[:, j] := eigenvec(D, Λ[j])
V = [
    -2.83134e-14, 0.968873, -0.213339, -0.0323618, 0.00268194, -0.121318;
    0, -0.0661533, 0.119333, -0.361575, 0.676628, -0.626755;
    0.707107, 0.162918, 0.655998, -0.108936, 0.00569986, 0.176704;
    0, 0.0304681, 0.251932, 0.866025, 0.0228322, -0.43021;
    0, 0.0538234, -0.126919, 0.307379, 0.735922, 0.587309;
    -0.707107, 0.162918, 0.655998, -0.108936, 0.00569986, 0.176704
]
C := M*V
C = [
    2.12132, 2.10147, 4.2138, -0.758513, 7.84125, 1.50569;
    2.12132, 2.10344, 3.62872, 1.35338, 6.28557, -6.2903;
    2.12132, 2.09597, 3.55154, 4.00819, 5.8913, 1.31171;
    2.12132, 2.12151, 5.71213, 2.84846, 9.30867, -1.89887;
    2.12132, 2.12222, 5.24619, 1.38739, 2.20026, -0.84122;
    2.12132, 2.06187, 5.60229, 1.78345, 5.72482, -1.97708
]
ΕΝ := (cols(D) - N[0])/(cols(D) - 1)
ΕΝ = -0.153273
