OrGraph(n) :=
    for i ∈ 1 .. n - 1
        for j ∈ i + 1 .. n
            x[i, j] ← if((rnd(1) - 0.5) > 0, 1, 0)
            M[i, j] ← if((rnd(1) - 0.5) > 0, -x[i, j], x[i, j])
            M[i, j] ← -M[i, j]
    M
DrawG(M) :=
    n ← cols(M)
    k ← n
    for i ∈ 1 .. n
        Cx[i] ← sin(2*π*(i - 1)/n)
        Cy[i] ← cos(2*π*(i - 1)/n)
    for i ∈ 1 .. n
        if not max(M[:, i])
            X[1, k] ← Cx[i]
            X[2, k] ← X[1, k]
            Y[1, k] ← Cy[i]
            Y[2, k] ← Y[1, k]
            Num[1, k] ← i
            Num[2, k] ← i
            k ← k + 1
    for j ∈ i .. n
        if M[i, j]
            X[1, k] ← Cx[i]
            X[2, k] ← Cx[j]
            Y[1, k] ← Cy[i]
            Y[2, k] ← Cy[j]
            Num[1, k] ← i
            Num[2, k] ← j
            k ← k + 1
    [X; Y; Num]
DrawS(M) :=
    dl ← 0.153
    α ← 5
    k ← 1
    X ← DrawG(M)[1]
    Y ← DrawG(M)[2]
    Num ← DrawG(M)[3]
    n ← cols(X)
    for x ∈ 1 .. n
        ugol[1, x] ← atan((Y[1, x] - Y[2, x])/(X[1, x] - X[2, x]))
    for x ∈ 1 .. n
        continue if Num[1, x] == Num[2, x]
        p ← 0
        p ← 2 if M[(Num[2, x], Num[1, x])] < 0
        p ← 1 if M[(Num[1, x], Num[2, x])] < 0
        if not p
            k ← k + 1
            continue
        p1 ← -1
        p1 ← 1 if X[2, x] > X[1, x] > X[p, x]
        for h ∈ 1 .. 2
            A[1, k] ← X[p, x]
            B[1, k] ← Y[p, x]
            a ← p1*dl*cos(α/57.3)
            b ← dl*sin(α/57.3)*(-1)^h
            A[2, k] ← a*cos(ugol[1, x]) - b*sin(ugol[1, x]) + X[p, x]
            B[2, k] ← a*sin(ugol[1, x]) + b*cos(ugol[1, x]) + Y[p, x]
            k ← k + 1
    [A; B]
M := OrGraph(9)
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