ORIGIN := 1
c := transpose([3, 1.5, 2.7, 3.8, 1.5])
x := transpose([0, 0, 0, 0, 0])
n := 5
f(x) := sum(x[i], i = 1 .. n)
t := transpose([65, 30, 70, 60, 20])
F := 65 + 30 + 60 + 20
F = 175
T := 60
F1 := F - T
F1 = 115
Given
x ≥ 0
(t[1] - x[1]/c[1]) + (t[2] - x[2]/c[2]) + (t[4] - x[4]/c[4]) + (t[5] - x[5]/c[5]) ≤ F1
(t[1] - x[1]/c[1]) + (t[2] - x[2]/c[2]) ≥ t[3] - x[3]/c[3]
x ≤ vectorize(c*t/2)
x := Minimize(f, x)
transpose(x) = [30, 22.5, 0, 95, 15]
f(x) = 162.5
ORIGIN := 1
c := transpose([3, 1.5, 2.7, 3.8, 1.5])
x := transpose([0, 0, 0, 0, 0])
n := 5
f(x) := sum(x[i], i = 1 .. n)
t := transpose([65, 30, 70, 60, 20])
F := 65 + 30 + 60 + 20
F = 175
T := 60
F1 := F - T
F1 = 115
Given
x ≥ 0
(t[3] - x[3]/c[3]) + (t[4] - x[4]/c[4]) + (t[5] - x[5]/c[5]) ≤ F1
(t[1] - x[1]/c[1]) + (t[2] - x[2]/c[2]) ≤ t[3] - x[3]/c[3]
x ≤ vectorize(c*t/2)
x := Minimize(f, x)
transpose(x) = [30, 22.5, 0, 95, 15]
f(x) = 162.5
t[2] - x[2]/c[2] ≤ t[3]
