ORIGIN := 1
n := 3
m := 3
j := 1 .. n
i := 1 .. m
t[j] := 1
l[i] := 1
c := [18, 15, 12; 6, 4, 8; 5, 3, 3]
a := [1; 1; 1]
b := [1; 1; 1]
f(x) := sum(sum(c[i, j]*x[i, j], j = 1 .. n), i = 1 .. m)
x[m, n] := 0
Given
x*t == a
transpose(x)*l == b
x ≥ 0
x := Minimize(f, x)
f(x) = 21
x = [0, 0, 1; 1, 0, 0; 0, 1, 0]
ORIGIN := 1
n := 3
m := 4
j := 1 .. n
i := 1 .. m
t[j] := 1
l[i] := 1
C := [6, 7, 3, 5; 1, 2, 5, 6; 8, 10, 20, 1]
b := [1; 1; 1; 1]
a := [1; 1; 1]
f(x) := sum(sum(C[i, j]*x[i, j], j = 1 .. n), i = 1 .. m)
x[m, n] := 0
Given
x*t == a
transpose(x)*1 == b
x ≥ 0
x := Minimize(f, x)  # error: Эта переменная не определена.
f(x) =  # error: Эта переменная не определена.
