M := [
    1, 1/6, 6, 6, 1/2, 5;
    5, 1, 2, 1/4, 3, 2;
    1/2, 6, 1, 3, 1/2, 6;
    5, 3, 7, 1, 4, 6;
    3, 6, 1/2, 4, 1, 3;
    4, 3, 7, 2, 3, 1
]
λ := eigenvals(M)
λ = [18.5694; -7.38729; -0.451816 + 3.59154i; -0.451816 - 3.59154i; -4.07702; -0.201444]
λmax := 18.569
EV := eigenvec(M, λmax)
EV = [0.436494; 0.283352; 0.353565; 0.540311; 0.375093; 0.41418]
SEV := sum(EV)
SEV = 2.403
NSV := EV/SEV
NSV = [0.181646; 0.117916; 0.147135; 0.224849; 0.156094; 0.17236]
NSV3 := [0.062; 0.406; 0.338; 0.24; 0.64; 0.467]
NSV2 := [0.45; 0.43; 0.898; 0.67; 0.333; 0.657]
NSV1 := [0.062; 0.006; 0.028; 0.94; 0.04; 0.07]
NSV5 := [0.16; 0.40; 0.28; 0.44; 0.74; 0.97]
NSV6 := [0.102; 0.476; 0.028; 0.304; 0.304; 0.607]
NSV4 := [0.062; 0.506; 0.228; 0.454; 0.84; 0.17]
GM := augment(NSV1, NSV2, NSV3, NSV4, NSV5, NSV6)
GM = [
    0.062, 0.45, 0.062, 0.062, 0.16, 0.102;
    0.006, 0.43, 0.406, 0.506, 0.4, 0.476;
    0.028, 0.898, 0.338, 0.228, 0.28, 0.028;
    0.94, 0.67, 0.24, 0.454, 0.44, 0.304;
    0.04, 0.333, 0.64, 0.84, 0.74, 0.304;
    0.07, 0.657, 0.467, 0.17, 0.97, 0.607
]
GM := stack(transpose(NSV), GM)
GM = [
    0.181646, 0.117916, 0.147135, 0.224849, 0.156094, 0.17236;
    0.062, 0.45, 0.062, 0.062, 0.16, 0.102;
    0.006, 0.43, 0.406, 0.506, 0.4, 0.476;
    0.028, 0.898, 0.338, 0.228, 0.28, 0.028;
    0.94, 0.67, 0.24, 0.454, 0.44, 0.304;
    0.04, 0.333, 0.64, 0.84, 0.74, 0.304;
    0.07, 0.657, 0.467, 0.17, 0.97, 0.607
]
GMT := transpose(GM)
GMT = [
    0.181646, 0.062, 0.006, 0.028, 0.94, 0.04, 0.07;
    0.117916, 0.45, 0.43, 0.898, 0.67, 0.333, 0.657;
    0.147135, 0.062, 0.406, 0.338, 0.24, 0.64, 0.467;
    0.224849, 0.062, 0.506, 0.228, 0.454, 0.84, 0.17;
    0.156094, 0.16, 0.4, 0.28, 0.44, 0.74, 0.97;
    0.17236, 0.102, 0.476, 0.028, 0.304, 0.304, 0.607
]
w1 := GMT[:, 0]*GMT[:, 1]
w2 := GMT[:, 0]*GMT[:, 2]
w3 := GMT[:, 0]*GMT[:, 3]
w4 := GMT[:, 0]*GMT[:, 4]
w5 := GMT[:, 0]*GMT[:, 5]
w6 := GMT[:, 0]*GMT[:, 6]
w1 = 0.129943
w2 = 0.369785
w3 = 0.260504
w4 = 0.508224
w5 = 0.497479
w6 = 0.453156
