A := [
    1, 3, 1/3, 1, 5, 7, 5, 1;
    1/5, 1, 1/5, 1/3, 3, 5, 7, 1/3;
    5, 5, 1, 7, 7, 5, 2, 1/3;
    1, 3, 1/3, 1, 3, 3, 5, 3;
    5, 1/3, 1/7, 3, 1, 1, 3, 1/7;
    7, 1/3, 1/7, 5, 1, 1, 7, 7;
    1/5, 1/3, 1/9, 3, 1/3, 1/3, 1, 1/9;
    7, 7, 5, 5, 3, 3, 3, 1
]
C := vectorize(A[:, 0]*A[:, 1]*A[:, 2]*A[:, 3]*A[:, 4]*A[:, 5]*A[:, 6]*A[:, 7])^(1/8)
C*1/sum(C) = [0.135093; 0.0643989; 0.200276; 0.130781; 0.0610927; 0.122817; 0.0254121; 0.26013]
C := (vectorize(B1*B2*B3*B4*B5*B6*B7*B8)^(1/8))  # error: Эта переменная не определена.
C*1/sum(C) =  # error: Эта переменная не определена.
A1 := [1, 1/3, 5, 1/7; 3, 1, 7, 1/3; 1/5, 1/7, 1, 1/9; 7, 3, 9, 1]
A5 := [1, 3, 3, 1/3; 1/3, 1, 1/3, 1/7; 1/3, 3, 1, 1/3; 3, 7, 3, 1]
C1 := vectorize(A1[:, 0]*A1[:, 1]*A1[:, 2]*A1[:, 3])^(1/4)
C5 := vectorize(A5[:, 0]*A5[:, 1]*A5[:, 2]*A5[:, 3])^(1/4)
C1*1/sum(C1) = [0.111404; 0.259411; 0.0378561; 0.591329]
C5*1/sum(C5) = [0.250768; 0.0676327; 0.144781; 0.536818]
A2 := [1, 3, 3, 1/5; 1/3, 1, 5, 1/3; 1/3, 1/5, 1, 1/7; 5, 3, 1, 1]
A6 := [1, 1, 3, 5; 1, 1, 3, 5; 1/3, 1/3, 1, 3; 1/5, 1/5, 1/3, 1]
C2 := vectorize(A2[:, 0]*A2[:, 1]*A2[:, 2]*A2[:, 3])^(1/4)
C6 := vectorize(A6[:, 0]*A6[:, 1]*A6[:, 2]*A6[:, 3])^(1/4)
C2*1/sum(C2) = [0.269244; 0.200683; 0.0726157; 0.457458]
C6*1/sum(C6) = [0.390813; 0.390813; 0.150892; 0.067481]
A3 := [1, 1/3, 1, 5; 3, 1, 5, 7; 1, 1/5, 1, 3; 1/5, 1/7, 1/3, 1]
A7 := [1, 3, 5, 7; 1/3, 1, 3, 3; 1/5, 1/3, 1, 3; 1/7, 1/3, 1/3, 1]
C3 := vectorize(A3[:, 0]*A3[:, 1]*A3[:, 2]*A3[:, 3])^(1/4)
C7 := vectorize(A7[:, 0]*A7[:, 1]*A7[:, 2]*A7[:, 3])^(1/4)
C3*1/sum(C3) = [0.205472; 0.578878; 0.159158; 0.0564927]
C7*1/sum(C7) = [0.577725; 0.237522; 0.120693; 0.0640602]
A4 := [1, 3, 5, 7; 1/3, 1, 3, 5; 1/5, 1/3, 1, 1; 1/7, 1/5, 1, 1]
A8 := [1, 1/3, 3, 1/3; 3, 1, 1, 1/3; 1/3, 1, 1, 1/5; 3, 3, 5, 1]
C4 := vectorize(A4[:, 0]*A4[:, 1]*A4[:, 2]*A4[:, 3])^(1/4)
C8 := vectorize(A8[:, 0]*A8[:, 1]*A8[:, 2]*A8[:, 3])^(1/4)
C4*1/sum(C4) = [0.570024; 0.26628; 0.0904843; 0.0732115]
C8*1/sum(C8) = [0.15641; 0.205847; 0.104597; 0.533147]
D := augment(C1*1/sum(C1), C2*1/sum(C2), C3*1/sum(C3), C4*1/sum(C4), C5*1/sum(C5), C6*1/sum(C6), C7*1/sum(C7), C8*1/sum(C8))
OTVET := D*(C*1/sum(C))  # error: Эта переменная не определена.
OTVET := □  # error: Пустой местозаполнитель.
