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E := 9
τ := 4
q := 2
T := q*τ
T = 8
ω := 2*π/T
ω = 0.785398
k := -10 .. 10
t := -40, -39.98 .. 40
u1(t) := E*(Φ(t + τ/2) - Φ(t - τ/2))
u(t) := sum(u1(t - k*T), k)
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Α[0] := E/q
n := 1 .. 30
Α[n] := 2*E*|sin(n*ω*τ/2)|/(π*n)
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q = 2
ϕ[n] := if(sin(n*ω*τ/2) ≥ 0, 0, π)
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N := 5
n := 1 .. N
us(t) := Α[0] + sum(Α[n]*cos(n*ω*t - ϕ[n]), n)
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N := 10
n := 1 .. N
us(t) := Α[0] + sum(Α[n]*cos(n*ω*t - ϕ[n]), n)
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N := 20
n := 1 .. N
us(t) := Α[0] + sum(Α[n]*cos(n*ω*t - ϕ[n]), n)
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N := 30
n := 1 .. N
us(t) := Α[0] + sum(Α[n]*cos(n*ω*t - ϕ[n]), n)
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