# Лабораторная работа 2
# Задание 3
E := 3.9
τ := 2
u(t) := E*(Φ(t + τ/2) - Φ(t - τ/2))
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N := 200
n := 0 .. N
fh := -10
Δf := 2*|fh|/N
f[n] := fh + n*Δf
Δf = 0.1
f = [
    -10; -9.9; -9.8; -9.7; -9.6; -9.5; -9.4; -9.3; -9.2; -9.1
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]
A[n] := integral(u(t)*cos(2*π*f[n]*t), t = -0.5*τ .. 0.5*τ)
S[n] := |A[n]|
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fm := 6
V := cspline(f, A)
A(x) := interp(V, f, A, x)
W1 := integral(A(x)^2, x = -fm .. fm)
W1 = 30.1601
W2 := integral(u(t)^2, t = -0.5*τ .. 0.5*τ)
W2 = 30.42
KW := W1/W2
KW = 0.991457
# Задание 2
us(t) := 2*integral(A(f)*cos(2*π*f*t), f = 0 .. fm)
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# Задание 3
# Вариант 1
fi := 1/(2*τ)
u(t) :=
    (E*cos(2*π*fi*t)) if |t| ≤ 0.5*τ
    0 if |t| > 0.5*τ
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N := 200
n := 0 .. N
fh := -10
Δf := 2*|fh|/N
f[n] := fh + n*Δf
A[n] := integral(u(t)*cos(2*π*f[n]*t), t = -0.5*τ .. 0.5*τ)
S[n] := |A[n]|
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V := cspline(f, A)
A(x) := interp(V, f, A, x)
W1 := integral(A(x)^2, x = -fm .. fm)
W1 = 15.2096
W2 := integral(u(t)^2, t = -0.5*τ .. 0.5*τ)
W2 = 15.21
KW := W1/W2
KW = 0.999974
us(t) := 2*integral(A(f)*cos(2*π*f*t), f = 0 .. fm)
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